// COMSOL Multiphysics 6.0.0.405 model "Re_300_two_cylinder_base.mph"
// Outline of the model tree

Parameters
  D = 0.1 [m]
  W = 25*D
  H = 17*D
  CX = 5*D+L
  D_rat = 1
  d = D_rat*D
  L_rat = 2
  L = L_rat*D
  alpha = 30 [deg]
  D_avg = (d+D)/2
  Re = 300
  rhorho = 1000 [kg/m^3]
  mumu = 1e-3 [Pa*s]
  U = Re*mumu/(rhorho*D_avg)
  St_guess = 0.5
  f_guess = St_guess*U/D_avg
  T_guess = 1/f_guess
  N = 10
  deltaT = T_guess/N
  NN = 100
  fin = deltaT*NN
  BLt = 0.1*D/sqrt(Re)
  time_st = W/U+0.25

Functions
  step1: Step | location = 0.1

Geometry
  geom1 "Geometry 1" (2D, length unit m)
    r1: Rectangle | pos = {-CX, -H/2}; size = {W, H}
    c1: Circle | r = D/2
    c2: Circle | pos = {L*cos(alpha), L*sin(alpha)}; r = d/2
    dif1: Difference | input = r1; input2 = c1, c2
    fin: Finalize "Form Union"

Materials
  mat1: Common "Material 1" on all domains
    def "Basic"
      density = rhorho
      dynamicviscosity = mumu

Physics
  spf: LaminarFlow on all domains
    dependent variable u = {u, v, w}
    fp1: FluidProperties (default)
    init1: init "Initial Values 1" (default)
    wallbc1: WallBC "Wall 1" (default)
    wallbc2: WallBC "Wall 2" on boundaries 2, 3 | BoundaryCondition = Slip
    inl1: InletBoundary "Inlet 1" on boundaries 1 | U0in = U*step1(t[1/s])
    out1: OutletBoundary "Outlet 1" on boundaries 4

Mesh
  mesh1 "Mesh 1"
    size: MeshSizeDefault | table = cfd; hmax = 0.0476; hmin = 6.8E-4; hcurve = 0.25; hauto = 3
    size1: Size on boundaries 5-12 | table = cfd; hmax = 0.0114; hmin = 3.4E-5; hcurve = 0.2; hgrad = 1.05; hauto = 1
    cr1: CornerRefinement on domains 1 | boundary = boundaries 5-12
    ftri1: FreeTri "Free Triangular 1" on remaining entities | smoothmaxiter = 4; smoothmaxdepth = 4
    bl1: BndLayer "Boundary Layers 1" on domains 1 | sharpcorners = trim; smoothmaxiter = 4; smoothmaxdepth = 6
      blp1: BndLayerProp "Boundary Layer Properties 1" on boundaries 5-12 | inittype = blhmin; blhmin = BLt

Studies
  std1 "Study 1"
    time: Transient "Time Dependent" | tlist = range(0,0.2,time_st-0.2) range(time_st, deltaT, time_st+fin)

Solver configurations
  sol1 "Solution 1" (study std1)
    v1: Variables "Dependent Variables 1"
    t1: Time "Time-Dependent Solver 1"
      tlist = range(0,0.2,time_st-0.2) range(time_st, deltaT, time_st+fin)
      rtol = 0.005
      atolglobalfactor = 0.05
      atolmethod = {comp1_p, scaled, comp1_u, global}
      atolvaluemethod = {comp1_p, factor, comp1_u, factor}
      atolfactor = {comp1_p, 1, comp1_u, 0.1}
      tstepsbdf = intermediate
      maxorder = 2
      stabcntrl = on
      bwinitstepfrac = 0.01
      estrat = exclude
      rhoinf = 0.5
      predictor = constant
      fc1: FullyCoupled
        linsolver = d1
        maxiter = 8
        ntolfact = 0.5
        damp = 0.9
        jtech = once
        stabacc = aacc
        aaccdim = 5
        aaccmix = 0.9
        aaccdelay = 1
      d1: Direct "Direct, fluid flow variables (spf)" | linsolver = pardiso; pivotperturb = 1.0E-13

Datasets
  dset1: Solution | solution = sol1

Plots
  pg1: PlotGroup2D "2D Plot Group 1" | data = dset1
    surf1: Surface | expr = spf.vorticityz*D_avg/U